ORIGIN := 1
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Rectangle(w, h, a, b) ≡ [a + transpose([0, w, w, 0, 0]); b + transpose([0, 0, h, h, 0])]
# Введіть зосереджені сили P, їх розташування d, моменти пар сил M та їх розташування c
P := [55; 0]*kN
d := [3.2; 0]*m
M := [45; 0]*kN·m
c := [2.8; 0]*m
# Введіть розподілені навантаження q, їх розташування a, протяжність b, довжину балки L та
# розташування опор на балці l_1 та l_2
q := [50; 0]*kN/m
a := [0.6; 0]*m
b := [2; 0]*m
L := 3.4*m
l[1] := 0.5*m
l[2] := 3*m
zn(m1) :=
    -1 if m1 < 0
    0 otherwise
Rp(m1) :=
    -1.5 if m1 < 0
    1.5 if m1 > 0
    0 otherwise
# Рисование фигуры
Rmom(m1) :=
    -0.5 if m1 < 0
    0.5 if m1 > 0
    0 otherwise
Rq(m1) :=
    -1 if m1 < 0
    1 if m1 > 0
    0 otherwise
[xrec; yrec] := Rectangle(L, L/50, 0, 0)
vector2(x, y, Lx, Ly, m) :=
    Ro ← transpose([x, x, x, x, x; y, y, y, y, y])
    I ← transpose([0, 0, 0.9, 0.9, 0; 0, 0, 0.45, -0.45, 0])
    Ω ← [Lx, Ly; -Ly, Lx]
    Ro + m*I*Ω
vector4(x, y, Lx, Ly, m) :=
    Ro ← transpose([x, x, x, x, x; y, y, y, y, y])
    I ← transpose([0, 1, 0.8, 0.8, 1; 0, 0, 0.04, -0.04, 0])
    Ω ← [Lx, Ly; -Ly, Lx]
    Ro + m*I*Ω
vector5(x, y, Lx, Ly, m) :=
    Ro ← transpose([x, x, x, x, x; y, y, y, y, y])
    I ← transpose([0, 1, 1, 1, 1; 0, 0, 0, 0, 0])
    Ω ← [Lx, Ly; -Ly, Lx]
    Ro + m*I*Ω
vector6(x, y, Lx, Ly, m) :=
    Ro ← transpose([x, x, x, x, x; y, y, y, y, y])
    I ← transpose([0, 1, 0.8, 0.8, 1; 0, 0, 0.1, -0.1, 0])
    Ω ← [Lx, Ly; -Ly, Lx]
    Ro + m*I*Ω
[x1; y1] := Rectangle(b[1], 0, a[1], L/15)
op1 := vector2(l[1], 0, 0, -0.1, 1*m)
op2 := vector2(l[2], 0, 0, -0.1, 1*m)
fp1 := vector4(d[1], L/50 + zn(P[1])*Rp(P[1])*m, 0, 1, Rp(P[1])*m)
fp2 := vector4(d[2], L/50 + zn(P[2])*Rp(P[2])*m, 0, 1, Rp(P[2])*m)
fpx[:, 1] := fp1[:, 1]
fpx[:, 2] := fp2[:, 1]
fpy[:, 1] := fp1[:, 2]
fpy[:, 2] := fp2[:, 2]
nn := 10
ln2 := vector5(a[2], L/50 + |Rq(q[2])|*m, 1, 0, b[2])
ln1 := vector5(a[1], L/50 + |Rq(q[1])|*m, 1, 0, b[1])
i := 1 .. nn + 1
ml1 := vector5(c[1], -|(Rmom(M[1])*m)|, 0, 1, 2*|Rmom(M[1])|*m)
pp2[i] := vector4(a[1] + b[1]/nn*(i - 1), L/50 + zn(q[1])*Rq(q[1])*m, 0, 1, Rq(q[1])*m)
pp3[i] := vector4(a[2] + b[2]/nn*(i - 1), L/50 + zn(q[2])*Rq(q[2])*m, 0, 1, Rq(q[2])*m)
mr1 := vector6(c[1], 0.01*m + |Rmom(M[1])|*m, 1, 0, Rmom(M[1])*m)
xx[:, i] := pp2[i][:, 1]
yy[:, i] := pp2[i][:, 2]
xx[:, nn + 2] := ln1[:, 1]
mg1 := vector6(c[1], -(|Rmom(M[1])|*m), -1, 0, Rmom(M[1])*m)
yy[:, nn + 2] := ln1[:, 2]
mr1 = [2.8, 0.51; 3.3, 0.51; 3.2, 0.56; 3.2, 0.46; 3.3, 0.51] m
xz[:, i] := pp3[i][:, 1]
yz[:, nn + 2] := ln2[:, 2]
xz[:, nn + 2] := ln2[:, 1]
yz[:, i] := pp3[i][:, 2]
ml2 := vector5(c[2], -L/50, 0, 0.145, Rmom(M[2])*m)
mfx[:, 1] := ml1[:, 1]
mfx[:, 2] := mr1[:, 1]
mfx[:, 3] := mg1[:, 1]
mr2 := vector4(c[2], L/9.4, 0.1, 0, Rmom(M[2])*m)
mfy[:, 1] := ml1[:, 2]
mfy[:, 2] := mr1[:, 2]
mfy[:, 3] := mg1[:, 2]
mg2 := vector4(c[2], -L/50, -0.1, 0, Rmom(M[2])*m)
mfx[:, 4] := ml2[:, 1]
mfx[:, 5] := mr2[:, 1]
mfx[:, 6] := mg2[:, 1]
L/50 = 0.068 m
yy[:, 1] = [0.068; 1.068; 0.868; 0.868; 1.068] m
ln1 = [0.6, 1.068; 2.6, 1.068; 2.6, 1.068; 2.6, 1.068; 2.6, 1.068] m
xx[:, 1] = [0.6; 0.6; 0.56; 0.64; 0.6] m
L = 3.4 m
mfy[:, 4] := ml2[:, 2]
mfy[:, 5] := mr2[:, 2]
mfy[:, 6] := mg2[:, 2]
8/0.32 = 25
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# Визначаємо вклад в поперечну силу в перерізі z від зосереджених сил
Q_p(z) := sum(P[i]*(z > d[i]), i = 1 .. rows(P))
# Визначаємо вклад в поперечну силу в перерізі z від розподілених навантажень
Q_q(z) := sum(q[i]*(z - a[i])*(z > a[i]), i = 1 .. rows(q)) - sum(q[i]*(z - a[i] - b[i])*(z > a[i] + b[i]), i = 1 .. rows(q))
M_zm(z) := sum(M[i]*(z > c[i]), i = 1 .. rows(M))
M_zP(z) := sum(P[i]*(z - d[i])*(z > d[i]), i = 1 .. rows(P))
M_zq(z) := sum(q[i]*(z - a[i])^2/2*(z > a[i]), i = 1 .. rows(q)) - sum(q[i]*(z - a[i] - b[i])^2/2*(z > a[i] + b[i]), i = 1 .. rows(q))
# Поперечная сила в перерізі z, обумовлена силами реакцій R1 и R2
Q_R1(R1, z) := R1*(z ≥ l[1])
Q_R2(R2, z) := R2*(z ≥ l[2])
Q(R1, R2, z) := Q_R1(R1, z) + Q_R2(R2, z) + Q_p(z) + Q_q(z)
M_zR1(R1, z) := R1*(z - l[1])*(z ≥ l[1])
M_zR2(R2, z) := R2*(z - l[2])*(z ≥ l[2])
M_z(R1, R2, z) := M_zR1(R1, z) + M_zR2(R2, z) + M_zm(z) + M_zP(z) + M_zq(z)
# Визначаємо опорні реакції
R2 := 1/(l[2] - l[1])*(sum(M[i], i = 1 .. rows(M)) - sum(P[i]*(d[i] - l[1]), i = 1 .. rows(P)) - sum(q[i]*b[i]*(a[i] + b[i]/2 - l[1]), i = 1 .. rows(q)))
R2 = -85400 N
R1 := 1/(l[2] - l[1])*(-sum(M[i], i = 1 .. rows(M)) + sum(P[i]*(d[i] - l[2]), i = 1 .. rows(P)) - sum(q[i]*b[i]*(l[2] - a[i] - b[i]/2), i = 1 .. rows(q)))
R1 = -69600 N
M_z(R1, R2, L) = -2.91038e-11 J
z := 0*m, 0.02*m .. L
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DT := [
    10, 7.402, 37.758, 6.352, 30.991;
    12, 10.626, 49.714, 9.344, 39.881;
    14, 14.643, 60.227, 13.072, 47.911;
    16, 19.346, 70.878, 17.440, 56.051;
    18, 25.201, 81.860, 22.880, 64.658;
    "18a", 28.005, 80.166, 25.440, 64.971;
    20, 32.140, 93.137, 29.440, 73.600;
    "20a", 35.536, 91.513, 32.480, 74.077;
    22, 40.276, 106.648, 37.120, 84.091;
    "22a", 44.154, 104.441, 40.640, 84.285;
    24, 50.100, 120.338, 46.240, 95.097;
    "24a", 55.172, 118.225, 50.720, 95.640;
    27, 64.026, 147.557, 59.360, 114.515;
    "27a", 70.513, 144.836, 65.110, 115.284;
    30, 81.030, 180.046, 75.520, 137.373;
    "30a", 89.361, 176.713, 82.880, 138.548;
    33, 102.367, 215.074, 95.520, 162.549;
    36, 127.657, 252.820, 118.880, 189.787;
    40, 163.097, 316.526, 152.480, 232.241;
    45, 210.216, 392.515, 196.960, 281.236;
    50, 270.712, 494.005, 254.240, 345.828;
    55, 346.380, 605.383, 325.600, 416.990;
    60, 435.470, 727.747, 409.600, 494.526
]
h := 0.03*m
n := ceil(L/h) + 1
a := 0*m
i := 1 .. n
r[i] := a + (i - 1)*h
qm[i] := Q(R1, R2, r[i])
Mz[i] := M_z(R1, R2, r[i])
qmm := qm/kN
Mzm := Mz/(kN*m)
rows(DT) = 23
n = 115
Prov(DT, n) :=
    m ← rows(DT)
    for i ∈ 1 .. m
        kt ← 0
        for j ∈ 1 .. n
            kt ← 1 if |Mzm[j]| > DT[i, 4]
            kt ← 1 if (Mzm[j]^2/DT[i, 2]^2 + qmm[j]^2/DT[i, 3]^2) ≥ 1
            kt ← 1 if |qmm[j]| > DT[i, 5]
        k ← i
        break if kt == 0
    kz ← "нет" if kt == 1
    kz ← DT[k, 1] otherwise
    [k; kz]
Prov(DT, n) = [13; 27]
rb := r/m
poz := Prov(DT, n)
f(xx, a, b, m1, q1) :=
    zz ← m1 if xx < b*sqrt(1 - m1^2/a^2)
    zz ← 0 if xx > b
    zz ← a*sqrt(1 - xx^2/b^2) otherwise
    zz
hq := 0.05
gr := poz[1]
grp := gr - 1
a1 := DT[gr, 2]
m1 := DT[gr, 4]
a2 := DT[grp, 2]
m2 := DT[grp, 4]
q1 := DT[gr, 5]
b1 := DT[gr, 3]
q2 := DT[grp, 5]
b2 := DT[grp, 3]
nq2 := ceil(b2/hq)
nq := ceil(b1/hq)
jp := 1 .. nq2 + 1
j := 1 .. nq + 1
qxp[jp] := (jp - 1)*hq
qx[j] := (j - 1)*hq
q2y := a1*sqrt(1 - q2^2/b2^2)
q1y := a1*sqrt(1 - q1^2/b1^2)
mq := ceil(q1y/hq)
mq2 := ceil(q2y/hq)
k := 1 .. mq + 1
kp := 1 .. mq2 + 1
my[k] := (k - 1)*hq
nomdv := Prov(DT, n)[2]
nom1 := Prov(DT, n)[1] - 1
nomdvpr := DT[nom1, 1]
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# Двотавр номер
nomdv = 27
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# Двотавр номер
nomdvpr = "24a"
lnn := 2*m
E := 2*10^11*N/m^2
Jx := 5500*10^-8*m^4
E*Jx = 11000000 kg*m^3/s^2
Kff := 1/(E*Jx)
Kff = 9.09091e-8 s^2/(kg*m^3)
MP1(z, lnn) :=
    z - lnn if (z > lnn) and (z ≤ l[1])
    (z - lnn) - (l[2] - lnn)/(l[2] - l[1])*(z - l[1]) if (z > l[1]) and (z ≤ l[2])
    0 otherwise
MP2(z, lnn) :=
    -(l[2] - lnn)/(l[2] - l[1])*(z - l[1]) if (z > l[1]) and (z ≤ lnn)
    -(l[2] - lnn)/(l[2] - l[1])*(z - l[1]) + (z - lnn) if (z > lnn) and (z ≤ l[2])
    0 otherwise
MP3(z, lnn) :=
    (lnn - l[2])/(l[2] - l[1])*(z - l[1]) if (z ≥ l[1]) and (z ≤ l[2])
    lnn - z if (z > l[2]) and (z ≤ lnn)
    0 otherwise
MP(z, lnn) :=
    MP1(z, lnn) if (lnn ≥ 0) and (lnn ≤ l[1])
    MP2(z, lnn) if (lnn > l[1]) and (lnn ≤ l[2])
    MP3(z, lnn) if (lnn > l[2]) and (lnn ≤ L)
    0 otherwise
l[1] = 0.5 m
l[2] = 3 m
L = 3.4 m
M_z(R1, R2, 1*m) = -30800 J
Mzz(z) := M_z(R1, R2, z)/(kN*m)
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δn(lngr) := integral(MP(z, lngr)*M_z(R1, R2, z), z = 0 .. L)*Kff
lnn = 2 m
δn(lnn) = 0.00323837 m
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# График зависимости прогиба(м) от сечения балки
MPP1(z, lnn) :=
    1 if (z > lnn) and (z ≤ l[1])
    1 - 1/(l[2] - l[1])*(z - l[1]) if (z > l[1]) and (z ≤ l[2])
    0 otherwise
MPP2(z, lnn) :=
    -1/(l[2] - l[1])*(z - l[1]) if (z > l[1]) and (z ≤ lnn)
    -1/(l[2] - l[1])*(z - l[1]) + 1 if (z > lnn) and (z ≤ l[2])
    0 otherwise
MPP3(z, lnn) :=
    -1/(l[2] - l[1])*(z - l[1]) if (z ≥ l[1]) and (z ≤ l[2])
    -1 if (z > l[2]) and (z ≤ lnn)
    0 otherwise
MPP(z, lnn) :=
    MPP1(z, lnn) if (lnn ≥ 0) and (lnn ≤ l[1])
    MPP2(z, lnn) if (lnn > l[1]) and (lnn ≤ l[2])
    MPP3(z, lnn) if (lnn > l[2]) and (lnn ≤ L)
    0 otherwise
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θk(lngr) := integral(MPP(z, lngr)*M_z(R1, R2, z), z = 0 .. L)*Kff
θk(2*m) = 0.000993536
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